// SBML level 3 version 1

model Chassagnole2002_Carbon_Metabolism()
  // http: //jjj.biochem.sun.ac.za
  // To cite JWS Online please refer to: Olivier, B.G. and Snoep, J.L. (2004)
  // , Bioinformatics, 20: 2143-2144
  // This model originates from BioModels Database: A Database of Annotated Published Models (http://www.ebi.ac.uk/biomodels/). It is copyright (c) 2005-2012 The BioModels.net Team.
  // To cite BioModels Database, please use:
  // Li C, Donizelli M, Rodriguez N, Dharuri H, Endler L, Chelliah V, Li L, He E, Henry A, Stefan MI, Snoep JL, Hucka M, Le Novère N, Laibe C (2010) BioModels Database: An enhanced, curated and annotated resource for published quantitative kinetic models. BMC Syst Biol., 4:92.

  // Compartments:
  compartment extracellular = 1;
  compartment cytosol = 1;

  // Species:
  substanceOnly species cpep in cytosol = 2.67*cytosol; cpep is "Phosphoenol pyruvate";
  substanceOnly species cglcex in extracellular = 2*extracellular; cglcex is "Extracellular Glucose";
  substanceOnly species cg6p in cytosol = 3.48*cytosol; cg6p is "Glucose-6-Phosphate";
  substanceOnly species cpyr in cytosol = 2.67*cytosol; cpyr is "Pyruvate";
  substanceOnly species cf6p in cytosol = 0.6*cytosol; cf6p is "Fructose-6-Phosphate";
  substanceOnly species cg1p in cytosol = 0.653*cytosol; cg1p is "Glucose-1-Phosphate";
  substanceOnly species cpg in cytosol = 0.808*cytosol; cpg is "6-Phosphogluconate";
  substanceOnly species cfdp in cytosol = 0.272*cytosol; cfdp is "Fructose-1,6-bisphosphate";
  substanceOnly species csed7p in cytosol = 0.276*cytosol; csed7p is "sedoheptulose-7-phosphate";
  substanceOnly species cgap in cytosol = 0.218*cytosol; cgap is "Glyceraldehyde-3-Phosphate";
  substanceOnly species ce4p in cytosol = 0.098*cytosol; ce4p is "Erythrose-4-phosphate";
  substanceOnly species cxyl5p in cytosol = 0.138*cytosol; cxyl5p is "Xylulose-5-phosphate";
  substanceOnly species crib5p in cytosol = 0.398*cytosol; crib5p is "Ribose-5-phosphate";
  substanceOnly species cdhap in cytosol = 0.167*cytosol; cdhap is "Dihydroxyacetonephosphate";
  substanceOnly species cpgp in cytosol = 0.008*cytosol; cpgp is "1,3-diphosphosphoglycerate";
  substanceOnly species cpg3 in cytosol = 2.13*cytosol; cpg3 is "3-Phosphoglycerate";
  substanceOnly species cpg2 in cytosol = 0.399*cytosol; cpg2 is "2-Phosphoglycerate";
  substanceOnly species cribu5p in cytosol = 0.111*cytosol; cribu5p is "Ribulose-5-phosphate";

  // Assignment rules:
  catp := 4.27 - 4.163*(t/(0.657 + 1.43*t + 0.0364*t^2));
  cadp := 0.582 + 1.73*2.731^(-0.15*t)*(0.12*t + 0.000214*t^3);
  camp := 0.123 + 7.25*(t/(7.25 + 1.47*t + 0.17*t^2)) + 1.073/(1.29 + 8.05*t);
  cnadph := 0.062 + 0.332*2.718^(-0.464*t)*(0.0166*t^1.58 + 0.000166*t^4.73 + 0.1312*10^(-9)*t^7.89 + 0.1362*10^(-12)*t^11 + 0.1233*10^(-15)*t^14.2);
  cnadp := 0.159 - 0.00554*(t/(2.8 - 0.271*t + 0.01*t^2)) + 0.182/(4.82 + 0.526*t);
  cnadh := 0.0934 + 0.00111*2.371^(-0.123*t)*(0.844*t + 0.104*t^3);
  cnad := 1.314 + 1.314*2.73^(-0.0435*t - 0.342) - (t + 7.871)*(2.73^(-0.0218*t - 0.171)/(8.481 + t));

  // Reactions:
  vPTS: cglcex + 65 cpep -> 65 cg6p + 65 cpyr; extracellular*rmaxPTS*cglcex*(cpep/cpyr)/((KPTSa1 + KPTSa2*(cpep/cpyr) + KPTSa3*cglcex + cglcex*(cpep/cpyr))*(1 + cg6p^nPTSg6p/KPTSg6p)); vPTS is "Phosphotransferase system";
    rmaxPTS = 7829.78; KPTSa1 = 3082.3; KPTSa2 = 0.01; KPTSa3 = 245.3; nPTSg6p = 3.66; KPTSg6p = 2.15;
  vPGI: cg6p -> cf6p; cytosol*rmaxPGI*(cg6p - cf6p/KPGIeq)/(KPGIg6p*(1 + cf6p/(KPGIf6p*(1 + cpg/KPGIf6ppginh)) + cpg/KPGIg6ppginh) + cg6p); vPGI is "Glucose-6-phosphate isomerase";  // modifiers: cpg
    rmaxPGI = 650.9879; KPGIeq = 0.1725; KPGIg6p = 2.9; KPGIf6p = 0.266; KPGIf6ppginh = 0.2; KPGIg6ppginh = 0.2;
  vPGM: cg6p -> cg1p; cytosol*rmaxPGM*(cg6p - cg1p/KPGMeq)/(KPGMg6p*(1 + cg1p/KPGMg1p) + cg6p); vPGM is "Phosphoglucomutase";
    rmaxPGM = 0.8398243; KPGMeq = 0.196; KPGMg6p = 1.038; KPGMg1p = 0.0136;
  vG6PDH: cg6p -> cpg; cytosol*rmaxG6PDH*cg6p*cnadp/((cg6p + KG6PDHg6p)*(1 + cnadph/KG6PDHnadphg6pinh)*(KG6PDHnadp*(1 + cnadph/KG6PDHnadphnadpinh) + cnadp)); vG6PDH is "Glucose-6-phosphate dehydrogenase";
    rmaxG6PDH = 1.380197; KG6PDHg6p = 14.4; KG6PDHnadphg6pinh = 6.43; KG6PDHnadp = 0.0246; KG6PDHnadphnadpinh = 0.01;
  vPFK: cf6p -> cfdp; cytosol*rmaxPFK*catp*cf6p/((catp + KPFKatps*(1 + cadp/KPFKadpc))*(cf6p + KPFKf6ps*(1 + cpep/KPFKpep + cadp/KPFKadpb + camp/KPFKampb)/(1 + cadp/KPFKadpa + camp/KPFKampa))*(1 + LPFK/(1 + cf6p*(1 + cadp/KPFKadpa + camp/KPFKampa)/(KPFKf6ps*(1 + cpep/KPFKpep + cadp/KPFKadpb + camp/KPFKampb)))^nPFK)); vPFK is "Phosphofructokinase";  // modifiers: cpep
    rmaxPFK = 1840.585; KPFKatps = 0.123; KPFKadpc = 4.14; KPFKf6ps = 0.325; KPFKpep = 3.26; KPFKadpb = 3.89; KPFKampb = 3.2; KPFKadpa = 128; KPFKampa = 19.1; LPFK = 5629067; nPFK = 11.1;
  vTA: cgap + csed7p -> cf6p + ce4p; cytosol*rmaxTA*(cgap*csed7p - ce4p*cf6p/KTAeq); vTA is "Transaldolase";
    rmaxTA = 10.87164; KTAeq = 1.05;
  vTKA: crib5p + cxyl5p -> cgap + csed7p; cytosol*rmaxTKa*(crib5p*cxyl5p - csed7p*cgap/KTKaeq); vTKA is "Transketolase a";
    rmaxTKa = 9.473385; KTKaeq = 1.2;
  vTKB: ce4p + cxyl5p -> cgap + cf6p; cytosol*rmaxTKb*(cxyl5p*ce4p - cf6p*cgap/KTKbeq); vTKB is "Transketolase b";
    rmaxTKb = 86.55856; KTKbeq = 10;
  vMURSyNTH: 2 cf6p -> ; cytosol*rmaxMurSynth; vMURSyNTH is "Mureine synthesis";
    rmaxMurSynth = 0.00043711;
  vALDO: cfdp -> cdhap + cgap; cytosol*rmaxALDO*(cfdp - cgap*cdhap/kALDOeq)/(kALDOfdp + cfdp + kALDOgap*cdhap/(kALDOeq*VALDOblf) + kALDOdhap*cgap/(kALDOeq*VALDOblf) + cfdp*cgap/kALDOgapinh + cgap*cdhap/(VALDOblf*kALDOeq)); vALDO is "Aldolase";
    rmaxALDO = 17.41464; kALDOeq = 0.144; kALDOfdp = 1.75; kALDOgap = 0.088; VALDOblf = 2; kALDOdhap = 0.088; kALDOgapinh = 0.6;
  vGAPDH: cgap -> cpgp; cytosol*rmaxGAPDH*(cgap*cnad - cpgp*cnadh/KGAPDHeq)/((KGAPDHgap*(1 + cpgp/KGAPDHpgp) + cgap)*(KGAPDHnad*(1 + cnadh/KGAPDHnadh) + cnad)); vGAPDH is "Glyceraldehyde-3-phosphate dehydrogenase";
    rmaxGAPDH = 921.5943; KGAPDHeq = 0.63; KGAPDHgap = 0.683; KGAPDHpgp = 1.04e-5; KGAPDHnad = 0.252; KGAPDHnadh = 1.09;
  vTIS: cdhap -> cgap; cytosol*rmaxTIS*(cdhap - cgap/kTISeq)/(kTISdhap*(1 + cgap/kTISgap) + cdhap); vTIS is "Triosephosphate isomerase";
    rmaxTIS = 68.67474; kTISeq = 1.39; kTISdhap = 2.8; kTISgap = 0.3;
  vTRPSYNTH: -> cpyr + cgap; cytosol*rmaxTrpSynth; vTRPSYNTH is "Tryptophan synthesis";
    rmaxTrpSynth = 0.001037;
  vG3PDH: cdhap -> ; cytosol*rmaxG3PDH*cdhap/(KG3PDHdhap + cdhap); vG3PDH is "Glycerol-3-phosphate dehydrogenase";
    rmaxG3PDH = 0.01162043; KG3PDHdhap = 1;
  vPGK: cpgp -> cpg3; cytosol*rmaxPGK*(cadp*cpgp - catp*cpg3/KPGKeq)/((KPGKadp*(1 + catp/KPGKatp) + cadp)*(KPGKpgp*(1 + cpg3/KPGKpg3) + cpgp)); vPGK is "Phosphoglycerate kinase";
    rmaxPGK = 3021.774; KPGKeq = 1934.4; KPGKadp = 0.185; KPGKatp = 0.653; KPGKpgp = 0.0468; KPGKpg3 = 0.473;
  vsersynth: cpg3 -> ; cytosol*rmaxSerSynth*cpg3/(KSerSynthpg3 + cpg3); vsersynth is "Serine synthesis";
    rmaxSerSynth = 0.025712107; KSerSynthpg3 = 1;
  vrpGluMu: cpg3 -> cpg2; cytosol*rmaxPGluMu*(cpg3 - cpg2/KPGluMueq)/(KPGluMupg3*(1 + cpg2/KPGluMupg2) + cpg3); vrpGluMu is "Phosphoglycerate mutase";
    rmaxPGluMu = 89.04965; KPGluMueq = 0.188; KPGluMupg3 = 0.2; KPGluMupg2 = 0.369;
  vENO: cpg2 -> cpep; cytosol*rmaxENO*(cpg2 - cpep/KENOeq)/(KENOpg2*(1 + cpep/KENOpep) + cpg2); vENO is "Enolase";
    rmaxENO = 330.4476; KENOeq = 6.73; KENOpg2 = 0.1; KENOpep = 0.135;
  vPK: cpep -> cpyr; cytosol*rmaxPK*cpep*(cpep/KPKpep + 1)^(nPK - 1)*cadp/(KPKpep*(LPK*((1 + catp/KPKatp)/(cfdp/KPKfdp + camp/KPKamp + 1))^nPK + (cpep/KPKpep + 1)^nPK)*(cadp + KPKadp)); vPK is "Pyruvate kinase";  // modifiers: cfdp
    rmaxPK = 0.0611315; KPKpep = 0.31; nPK = 4; LPK = 1000; KPKatp = 22.5; KPKfdp = 0.19; KPKamp = 0.2; KPKadp = 0.26;
  vpepCxylase: cpep -> ; cytosol*rmaxpepCxylase*cpep*(1 + (cfdp/KpepCxylasefdp)^npepCxylasefdp)/(KpepCxylasepep + cpep); vpepCxylase is "PEP carboxylase";  // modifiers: cfdp
    rmaxpepCxylase = 0.1070206; KpepCxylasefdp = 0.7; npepCxylasefdp = 4.21; KpepCxylasepep = 4.07;
  vSynth1: cpep -> ; cytosol*rmaxSynth1*cpep/(KSynth1pep + cpep); vSynth1 is "Synthesis 1";
    rmaxSynth1 = 0.01953897; KSynth1pep = 1;
  vSynth2: cpyr -> ; cytosol*rmaxSynth2*cpyr/(KSynth2pyr + cpyr); vSynth2 is "Synthesis 2";
    rmaxSynth2 = 0.07361855; KSynth2pyr = 1;
  vDAHPS: ce4p + cpep -> ; cytosol*rmaxDAHPS*ce4p^nDAHPSe4p*cpep^nDAHPSpep/((KDAHPSe4p + ce4p^nDAHPSe4p)*(KDAHPSpep + cpep^nDAHPSpep)); vDAHPS is "DAHP synthesis";
    rmaxDAHPS = 0.1079531; nDAHPSe4p = 2.6; nDAHPSpep = 2.2; KDAHPSe4p = 0.035; KDAHPSpep = 0.0053;
  vPDH: cpyr -> ; cytosol*rmaxPDH*cpyr^nPDH/(KPDHpyr + cpyr^nPDH); vPDH is "Pyruvate dehydrogenase";
    rmaxPDH = 6.059531; nPDH = 3.68; KPDHpyr = 1159;
  vMethSynth: -> cpyr; cytosol*rmaxMetSynth; vMethSynth is "Methionine synthesis";
    rmaxMetSynth = 0.0022627;
  vPGDH: cpg -> cribu5p; cytosol*rmaxPGDH*cpg*cnadp/((cpg + KPGDHpg)*(cnadp + KPGDHnadp*(1 + cnadph/KPGDHnadphinh)*(1 + catp/KPGDHatpinh))); vPGDH is "6-Phosphogluconate dehydrogenase";
    rmaxPGDH = 16.23236; KPGDHpg = 37.5; KPGDHnadp = 0.0506; KPGDHnadphinh = 0.0138; KPGDHatpinh = 208;
  vR5PI: cribu5p -> crib5p; cytosol*rmaxR5PI*(cribu5p - crib5p/KR5PIeq); vR5PI is "Ribose-phosphate isomerase";
    rmaxR5PI = 4.83841193; KR5PIeq = 4;
  vRu5P: cribu5p -> cxyl5p; cytosol*rmaxRu5P*(cribu5p - cxyl5p/KRu5Peq); vRu5P is "Ribulose-phosphate epimerase";
    rmaxRu5P = 6.739029; KRu5Peq = 1.4;
  vPPK: crib5p -> ; cytosol*rmaxRPPK*crib5p/(KRPPKrib5p + crib5p); vPPK is "Ribose phosphate pyrophosphokinase";
    rmaxRPPK = 0.01290045; KRPPKrib5p = 0.1;
  vG1PAT: cg1p -> ; cytosol*rmaxG1PAT*cg1p*catp*(1 + (cfdp/KG1PATfdp)^nG1PATfdp)/((KG1PATatp + catp)*(KG1PATg1p + cg1p)); vG1PAT is "Glucose-1-phosphate adenyltransferase";  // modifiers: cfdp
    rmaxG1PAT = 0.007525458; KG1PATfdp = 0.119; nG1PATfdp = 1.2; KG1PATatp = 4.42; KG1PATg1p = 3.2;
  vG6P: cg6p -> ; cytosol*vG6P_mu*cg6p; vG6P is "G6P degradation";
    vG6P_mu = 2.78e-5;
  vf6P: cf6p -> ; cytosol*vf6P_mu*cf6p; vf6P is "F6P degradation";
    vf6P_mu = 2.78e-5;
  vfdP: cfdp -> ; cytosol*vfdP_mu*cfdp; vfdP is "FDP degradation";
    vfdP_mu = 2.78e-5;
  vGAP: cgap -> ; cytosol*vGAP_mu*cgap; vGAP is "GAP degradation";
    vGAP_mu = 2.78e-5;
  vDHAP: cdhap -> ; cytosol*vDHAP_mu*cdhap; vDHAP is "DHAP degradation";
    vDHAP_mu = 2.78e-5;
  vPGP: cpgp -> ; cytosol*vPGP_mu*cpgp; vPGP is "PGP degradation";
    vPGP_mu = 2.78e-5;
  vPG3: cpg3 -> ; cytosol*vPG3_mu*cpg3; vPG3 is "PG3 degradation";
    vPG3_mu = 2.78e-5;
  vpg2: cpg2 -> ; cytosol*vpg2_mu*cpg2; vpg2 is "PG2 degradation";
    vpg2_mu = 2.78e-5;
  vPEP: cpep -> ; cytosol*vPEP_mu*cpep; vPEP is "PEP degradation";
    vPEP_mu = 2.78e-5;
  vRibu5p: cribu5p -> ; cytosol*vRibu5p_mu*cribu5p; vRibu5p is "Ribu5P dilution";
    vRibu5p_mu = 2.78e-5;
  vRIB5P: crib5p -> ; cytosol*vRIB5P_mu*crib5p; vRIB5P is "Rib5P dilution";
    vRIB5P_mu = 2.78e-5;
  vXYL5P: cxyl5p -> ; cytosol*vXYL5P_mu*cxyl5p; vXYL5P is "XYL5P dilution";
    vXYL5P_mu = 2.78e-5;
  vSED7P: csed7p -> ; cytosol*vSED7P_mu*csed7p; vSED7P is "SED7P dilution";
    vSED7P_mu = 2.78e-5;
  vpyr: cpyr -> ; cytosol*vpyr_mu*cpyr; vpyr is "Pyruvate dilution";
    vpyr_mu = 2.78e-5;
  vPG: cpg -> ; cytosol*vPG_mu*cpg; vPG is "PG dilution";
    vPG_mu = 2.78e-5;
  vE4P: ce4p -> ; cytosol*vE4P_mu*ce4p; vE4P is "E4P dilution";
    vE4P_mu = 2.78e-5;
  vGLP: cg1p -> ; cytosol*vGLP_mu*cg1p; vGLP is "GLP dilution";
    vGLP_mu = 2.78e-5;
  vEXTER: -> cglcex; extracellular*Dil*(cfeed - cglcex); vEXTER is "Extracellular glucose kinetics";
    Dil = 2.78e-5; cfeed = 110.96;
end
